*HEADING
Concrete Fire Testing - Pillar 3 Numerical Modeling

*PART, NAME=CONCRETE_SPECIMEN
*NODE
1, 0.000, 0.000, -100.000
2, 2.500, 0.000, -100.000
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*ELEMENT, TYPE=C3D8R
1, 1, 2, 23, 22, 526, 527, 548, 547
2, 2, 3, 24, 23, 527, 528, 549, 548
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*ELSET, ELSET=ALL_ELEMENTS
1-19200

*NSET, NSET=TOP_SURFACE
21001
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
*NSET, NSET=BOTTOM_SURFACE
1
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
*NSET, NSET=SIDE_SURFACE
21
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
*MATERIAL, NAME=CONCRETE
*DENSITY
2400
*CONDUCTIVITY
1.8
*SPECIFIC HEAT
1000
*EXPANSION
10e-6
*ELASTIC
30000, 0.2
*PLASTIC
40.0, 0.0
*CONCRETE DAMAGED PLASTICITY
36.0, 0.1, 1.16, 0.667
*DAMAGE EVOLUTION, TYPE=ENERGY
0.0, 0.0
*DECHYDRATION
0.05, 105, 45000, 1e6
*PORE PRESSURE
101325, 8.07131, 1730.63, 233.426
*END PART

*ASSEMBLY, NAME=ASSEMBLY
*INSTANCE, NAME=CONCRETE_SPECIMEN-1, PART=CONCRETE_SPECIMEN
*END INSTANCE
*END ASSEMBLY

*STEP, NAME=HEAT_TRANSFER
*HEAT TRANSFER
0.01, 7200
*BOUNDARY
BOTTOM_SURFACE, 1, 3, 0
*SFILM
TOP_SURFACE, F, 25, 0.7, 0.5
SIDE_SURFACE, F, 25, 0.7, 0.5
*TEMPERATURE
TOP_SURFACE, 20
SIDE_SURFACE, 20
*END STEP

*STEP, NAME=MECHANICAL
*STATIC
0.01, 7200
*BOUNDARY
BOTTOM_SURFACE, 1, 3, 0
*DLOAD
ALL_ELEMENTS, GRAV, 9.81, 0, 0, -1
*END STEP
