*Heading
** SOFC CPS4T coupled model - generated by generate_sofc_inp.py
** Domain: 10 mm x 1 mm; units SI; schedule HR4
*Preprint, echo=NO, model=NO, history=NO, contact=NO
*Part, name=SOFC2D
*Node
1, 0.000000000e+00, 0.000000000e+00
2, 1.250000000e-04, 0.000000000e+00
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*Element, type=CPS4T
1, 1, 2, 83, 82
2, 2, 3, 84, 83
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*Elset, elset=ANODE
1, 2, 3, 4, 5, 6
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*Elset, elset=ELYTE
3841, 3842, 3843, 3844, 3845, 3846
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*Elset, elset=CATH
4801, 4802, 4803, 4804, 4805, 4806
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*Elset, elset=INTCONN
8641, 8642, 8643, 8644, 8645, 8646
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*Elset, elset=ELTOP
9281, 9282, 9283, 9284, 9285, 9286
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*Elset, elset=EL_ANODE_TOPROW
3761, 3762, 3763, 3764, 3765, 3766
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*Elset, elset=EL_ELYTE_TOPROW
4721, 4722, 4723, 4724, 4725, 4726
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*Elset, elset=EL_CATH_TOPROW
8561, 8562, 8563, 8564, 8565, 8566
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*Surface, name=YTOP_SURF, type=ELEMENT
ELTOP, S3
*Surface, name=INT_AE, type=ELEMENT
EL_ANODE_TOPROW, S3
*Surface, name=INT_EC, type=ELEMENT
EL_ELYTE_TOPROW, S3
*Surface, name=INT_CI, type=ELEMENT
EL_CATH_TOPROW, S3
*End Part
*Assembly, name=Assembly
*Instance, name=SOFC2D-1, part=SOFC2D
*End Instance
*Nset, nset=X0, instance=SOFC2D-1
1, 82, 163, 244, 325, 406
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*Nset, nset=Y0, instance=SOFC2D-1
1, 2, 3, 4, 5, 6
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*Nset, nset=YTOP, instance=SOFC2D-1
9478, 9479, 9480, 9481, 9482, 9483
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*Elset, elset=ANODE, instance=SOFC2D-1
1, 2, 3, 4, 5, 6
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*Elset, elset=ELYTE, instance=SOFC2D-1
3841, 3842, 3843, 3844, 3845, 3846
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*Elset, elset=CATH, instance=SOFC2D-1
4801, 4802, 4803, 4804, 4805, 4806
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*Elset, elset=INTCONN, instance=SOFC2D-1
8641, 8642, 8643, 8644, 8645, 8646
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*Elset, elset=ELTOP, instance=SOFC2D-1
9281, 9282, 9283, 9284, 9285, 9286
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*Elset, elset=EL_ANODE_TOPROW, instance=SOFC2D-1
3761, 3762, 3763, 3764, 3765, 3766
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*Elset, elset=EL_ELYTE_TOPROW, instance=SOFC2D-1
4721, 4722, 4723, 4724, 4725, 4726
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*Elset, elset=EL_CATH_TOPROW, instance=SOFC2D-1
8561, 8562, 8563, 8564, 8565, 8566
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*Surface, name=YTOP_SURF_ASM, type=ELEMENT, internal
ELTOP, S3
*Surface, name=INT_AE_ASM, type=ELEMENT, internal
EL_ANODE_TOPROW, S3
*Surface, name=INT_EC_ASM, type=ELEMENT, internal
EL_ELYTE_TOPROW, S3
*Surface, name=INT_CI_ASM, type=ELEMENT, internal
EL_CATH_TOPROW, S3
*End Assembly
*Material, name=ANODE
*Density
6500
*Elastic
1.4e+11, 0.3, 298
9.1e+10, 0.3, 1273
*Expansion
1.25e-05, 298
1.35e-05, 1273
*Conductivity
6, 298
4, 1273
*Specific Heat
450, 298
570, 1273
*Material, name=ELYTE
*Density
6000
*Elastic
2.1e+11, 0.28, 298
1.7e+11, 0.28, 1273
*Expansion
1.05e-05, 298
1.12e-05, 1273
*Conductivity
2.6, 298
2, 1273
*Specific Heat
400, 298
600, 1273
*Material, name=CATH
*Density
6600
*Elastic
1.2e+11, 0.3, 298
8.4e+10, 0.3, 1273
*Expansion
1.15e-05, 298
1.24e-05, 1273
*Conductivity
2, 298
1.8, 1273
*Specific Heat
480, 298
610, 1273
*Material, name=INTCONN
*Density
7700
*Elastic
2.05e+11, 0.3, 298
1.5e+11, 0.3, 1273
*Expansion
1.25e-05, 298
1.32e-05, 1273
*Conductivity
20, 298
15, 1273
*Specific Heat
500, 298
700, 1273
*Solid Section, elset=ANODE, material=ANODE
,
*Solid Section, elset=ELYTE, material=ELYTE
,
*Solid Section, elset=CATH, material=CATH
,
*Solid Section, elset=INTCONN, material=INTCONN
,
*Amplitude, name=HR4
0, 298,
13125, 1173,
13725, 1173,
26850, 298
*Step, name=COUPLED, nlgeom=YES
*Coupled Temperature-Displacement
26850, 1., 1e-06, 26850
*Boundary
X0, 1, 1, 0.
Y0, 2, 2, 0.
*Temperature, amplitude=HR4
Y0, 298.
*Film
YTOP_SURF_ASM, 25., 298.
*Output, field
*Element Output, directions=YES
S, E, LE, HFL, NT
*Node Output
U, NT
*Output, history
*Element Output, elset=EL_ANODE_TOPROW
S11, S22, S12
*Element Output, elset=EL_ELYTE_TOPROW
S11, S22, S12
*Element Output, elset=EL_CATH_TOPROW
S11, S22, S12
*End Step
