*HEADING
SOFC Multi-Physics Simulation - Heat Transfer + Thermo-Mechanical Analysis
2D Cross-section of Single SOFC Repeat Unit
Sequential Analysis: Heat Transfer -> Thermo-Mechanical
Heating Rate: HR10 (10.0 °C/min)

*PART, NAME=SOFC_PART
*NODE
       1,0.000000e+00,0.000000e+00
       2,0.000000e+00,1.754386e-05
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
*ELEMENT, TYPE=DC2D4
       1,       1,       2,      60,      59
       2,       2,       3,      61,      60
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
*NSET, NSET=ANODE_NODES
       1,
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
*NSET, NSET=ELYTE_NODES
      24,
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
*NSET, NSET=CATH_NODES
      30,
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
*NSET, NSET=INTCONN_NODES
      53,
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
*NSET, NSET=X0_NODES
       1,
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
*NSET, NSET=Y0_NODES
       1,
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
*NSET, NSET=YTOP_NODES
      58,
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
*ELSET, ELSET=ANODE_ELEMS
       1,
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
*ELSET, ELSET=ELYTE_ELEMS
      21,
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
*ELSET, ELSET=CATH_ELEMS
      33,
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
*ELSET, ELSET=INTCONN_ELEMS
      53,
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
*MATERIAL, NAME=NI_YSZ_ANODE
*ELASTIC, DEPENDENCIES=1
   1.400e+11,   0.300, 298.0
   9.100e+10,   0.300, 1273.0
*EXPANSION, DEPENDENCIES=1
   1.250e-05, 298.0
   1.350e-05, 1273.0
*CONDUCTIVITY, DEPENDENCIES=1
   6.000, 298.0
   4.000, 1273.0
*SPECIFIC HEAT, DEPENDENCIES=1
 450.000, 298.0
 570.000, 1273.0
*PLASTIC, HARDENING=JOHNSON COOK
   1.500e+08,   2.000e+08,   0.350,   0.020,   1.000, 298.000,1720.000,   1.000
*CREEP, LAW=TIME, HARDENING=NONE
   1.000e-18,   3.500,   2.200e+05

*MATERIAL, NAME=YSZ_ELECTROLYTE
*ELASTIC, DEPENDENCIES=1
   2.100e+11,   0.280, 298.0
   1.700e+11,   0.280, 1273.0
*EXPANSION, DEPENDENCIES=1
   1.050e-05, 298.0
   1.120e-05, 1273.0
*CONDUCTIVITY, DEPENDENCIES=1
   2.600, 298.0
   2.000, 1273.0
*SPECIFIC HEAT, DEPENDENCIES=1
 400.000, 298.0
 600.000, 1273.0
*CREEP, LAW=TIME, HARDENING=NONE
   5.000e-22,   2.000,   3.800e+05

*MATERIAL, NAME=LSM_CATHODE
*ELASTIC, DEPENDENCIES=1
   1.200e+11,   0.300, 298.0
   8.400e+10,   0.300, 1273.0
*EXPANSION, DEPENDENCIES=1
   1.150e-05, 298.0
   1.240e-05, 1273.0
*CONDUCTIVITY, DEPENDENCIES=1
   2.000, 298.0
   1.800, 1273.0
*SPECIFIC HEAT, DEPENDENCIES=1
 480.000, 298.0
 610.000, 1273.0

*MATERIAL, NAME=FERRITIC_STEEL
*ELASTIC, DEPENDENCIES=1
   2.050e+11,   0.300, 298.0
   1.500e+11,   0.300, 1273.0
*EXPANSION, DEPENDENCIES=1
   1.250e-05, 298.0
   1.320e-05, 1273.0
*CONDUCTIVITY, DEPENDENCIES=1
  20.000, 298.0
  15.000, 1273.0
*SPECIFIC HEAT, DEPENDENCIES=1
 500.000, 298.0
 700.000, 1273.0

*SOLID SECTION, ELSET=ANODE_ELEMS, MATERIAL=NI_YSZ_ANODE
*SOLID SECTION, ELSET=ELYTE_ELEMS, MATERIAL=YSZ_ELECTROLYTE
*SOLID SECTION, ELSET=CATH_ELEMS, MATERIAL=LSM_CATHODE
*SOLID SECTION, ELSET=INTCONN_ELEMS, MATERIAL=FERRITIC_STEEL

*AMPLITUDE, NAME=HR10_AMPLITUDE, TIME=TOTAL TIME
       0.000,  25.000
    5250.000, 900.000
    5850.000, 900.000
   11100.000,  25.000

*STEP, NAME=HEAT_TRANSFER, INC=1000
*HEAT TRANSFER, DELTMX=200.0
*BOUNDARY
Y0_NODES, 11, 11, 25.0
*FILM
YTOP_NODES, F, 25.0, 25.0
*OUTPUT, FIELD
*NODE OUTPUT
NT, HFL
*ELEMENT OUTPUT
HFL
*END STEP

*STEP, NAME=THERMO_MECHANICAL, INC=1000, NLGEOM
*STATIC
*BOUNDARY
X0_NODES, 1, 1, 0.0
Y0_NODES, 2, 2, 0.0
*TEMPERATURE
ALL_NODES, 298.0
*OUTPUT, FIELD
*NODE OUTPUT
TEMP
*ELEMENT OUTPUT
S, Mises, LE, PEEQ, CEEQ
*OUTPUT, HISTORY
*NODE OUTPUT, NSET=INT_AE_NODES
*ELEMENT OUTPUT, ELSET=ANODE_ELEMS
S
*ELEMENT OUTPUT, ELSET=ELYTE_ELEMS
S
*END STEP
