! Material: R20S
! Temperature-dependent properties

! Elastic Modulus (MPa) vs Temperature (C)
MPTEMP
MPTEMP,1,20,40,60,80,100,120
MPDATA,EX,1
MPDATA,EX,1,1,32551.8,32274.6,31998.0,31721.8,31446.2,30636.7

! Thermal Conductivity (W/m-K) vs Temperature (C)
MPDATA,KXX,1
MPDATA,KXX,1,1,1.953,1.940,1.925,1.909,1.890,1.870
